*HEADING
Created by GiD on 09-Oct-23 at 22:13:05
*NODE
 1, -32.1973, -2.82194, 10
 2, -32.1973, -3.52269, 9.34
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*ELEMENT, TYPE=
1,   46,   42,   50,   41
*ELEMENT, TYPE=
2,   28,   33,   26,   30
*ELEMENT, TYPE=
3,   7,   4,   2,   3
*ELEMENT, TYPE=
4,   17,   19,   10,   9
*ELEMENT, TYPE=
5,   29,   31,   23,   34
*ELEMENT, TYPE=
6,   45,   40,   47,   43
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*NSET, NSET=Nset2
 1, 2, 3, 4, 5, 6
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*NSET, NSET=parte 1
 1, 2, 3, 4, 5, 6
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*MATERIAL,NAME=AISI_4340_Steel
*ELASTIC
21E+9,0.3
*DENSITY
0.785
*ELSET,ELSET=AISI_4340_Steel_Set
1,
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*ORIENTATION,NAME=Axes_system_1
     0.727,    -0.6867,  1.225e-16, -4.698e-17,  1.286e-16,          1
